<?xml version="1.0"?>
<!-- Hamilton Standard 54H60 -->
<!-- Based on tables generated with Aeromatic 0.96 -->

<propeller name="prop">
    <ixx>128.92</ixx>
    <diameter unit="IN"> 161.81 </diameter>
    <numblades> 4 </numblades>
    <minpitch> 12.0 </minpitch>
    <maxpitch> 45.0 </maxpitch>
    <reversepitch> -10.0</reversepitch>
    <minrpm>    700 </minrpm>
    <maxrpm>   1400 </maxrpm>
    <gearratio> 10.1476 </gearratio>
    <ct_factor> 1.00 </ct_factor>
    <cp_factor> 1.00 </cp_factor>

    <!-- thrust coefficient as a function of advance ratio and blade angle -->
    <table name="C_THRUST" type="internal">
        <tableData>
            -10        0         15        25        35        45        55        65       90
           -0.2      -0.2193    0.1236    0.4494    0.5505    0.6066    0.6403    0.5900    0.5055   0.0000
            0.0      -0.3258    0.0000    0.4494    0.5505    0.6066    0.6462    0.6039    0.5055   0.0000
            0.2      -0.3653   -0.1123    0.3878    0.5392    0.5981    0.6462    0.6039    0.5055   0.0000
            0.4      -0.3653   -0.2611    0.2921    0.5338    0.5869    0.6403    0.6039    0.5055   0.0000
            0.6      -0.3653   -0.3653    0.1546    0.4804    0.5617    0.6237    0.5954    0.5055   0.0000
            0.8      -0.3653   -0.3653    0.0085    0.3595    0.5451    0.6012    0.5954    0.5055   0.0000
            1.0      -0.3653   -0.3653   -0.1460    0.2193    0.5226    0.5702    0.5900    0.5055   0.0000
            1.2      -0.3653   -0.3653   -0.3006    0.0674    0.4296    0.5505    0.5900    0.5055   0.0000
            1.4      -0.3653   -0.3653   -0.3653   -0.0984    0.3092    0.5419    0.5788    0.5055   0.0000
            1.6      -0.3653   -0.3653   -0.3653   -0.2498    0.1685    0.5226    0.5675    0.5055   0.0000
            1.8      -0.3653   -0.3653   -0.3653   -0.3653    0.0283    0.4494    0.5505    0.5055   0.0000
            2.0      -0.3653   -0.3653   -0.3653   -0.3653   -0.1123    0.3510    0.5482    0.5055   0.0000
            2.2      -0.3653   -0.3653   -0.3653   -0.3653   -0.2530    0.2530    0.5392    0.5055   0.0000
            2.4      -0.3653   -0.3653   -0.3653   -0.3653   -0.3653    0.1348    0.4404    0.5055   0.0000
            2.6      -0.3653   -0.3653   -0.3653   -0.3653   -0.3653    0.0171    0.2786    0.4494   0.0000
            2.8      -0.3653   -0.3653   -0.3653   -0.3653   -0.3653   -0.1011    0.1824    0.3653   0.0000
            3.0      -0.3653   -0.3653   -0.3653   -0.3653   -0.3653   -0.2193    0.0957    0.2809   0.0000
            3.2      -0.3653   -0.3653   -0.3653   -0.3653   -0.3653   -0.3370    0.0085    0.1968   0.0000
            3.4      -0.3653   -0.3653   -0.3653   -0.3653   -0.3653   -0.3653   -0.0786    0.1123   0.0000
            3.6      -0.3653   -0.3653   -0.3653   -0.3653   -0.3653   -0.3653   -0.1658    0.0283   0.0000
            3.8      -0.3653   -0.3653   -0.3653   -0.3653   -0.3653   -0.3653   -0.2530   -0.0562   0.0000
            4.0      -0.3653   -0.3653   -0.3653   -0.3653   -0.3653   -0.3653   -0.3397   -0.1406   0.0000
            6.0      -0.3653   -0.3653   -0.3653   -0.3653   -0.3653   -0.3653   -0.3653   -0.3653   0.0000
        </tableData>
    </table>

    <!-- power coefficient as a function of advance ratio and blade angle -->
    <table name="C_POWER" type="internal">
        <tableData>
            -10        0        15        25        35        45        55        65       90
           -0.2      0.0322   0.0642    0.2251    0.5111    0.8814    1.2536    1.4464    1.6007   1.6007
            0.0      0.1286   0.0322    0.1929    0.4764    0.8428    1.2536    1.4522    1.6007   1.6007
            0.2      0.1832   0.0515    0.1865    0.4436    0.8061    1.2536    1.4522    1.6007   1.6007
            0.4      0.2469   0.1124    0.1607    0.4089    0.7656    1.2536    1.4522    1.6007   1.6007
            0.6      0.3028   0.1703    0.1061    0.3799    0.7174    1.2285    1.4464    1.6007   1.6007
            0.8      0.3568   0.2282    0.0322    0.3221    0.6750    1.1726    1.4464    1.6007   1.6007
            1.0      0.4108   0.2835    0.0322    0.2256    0.6364    1.1128    1.4407    1.6007   1.6007
            1.2      0.4667   0.2266   -0.1061    0.0868    0.5631    1.0665    1.4310    1.6007   1.6007
            1.4      0.5207   0.3915   -0.1601   -0.0642    0.4339    1.0511    1.4137    1.6007   1.6007
            1.6      0.5747   0.4474   -0.1871   -0.1929    0.2739    1.0221    1.3828    1.5429   1.6007
            1.8      0.6306   0.5014   -0.1929   -0.3221    0.0804    0.9064    1.3404    1.5101   1.6007
            2.0      0.6846   0.5554   -0.2469   -0.4494   -0.0964    0.7714    1.2767    1.4792   1.6007
            2.2      0.7386   0.6114   -0.3028   -0.5786   -0.2893    0.6268    1.2382    1.4137   1.6007
            2.4      0.7946   0.6654   -0.3568   -0.7078   -0.4821    0.4474    1.2015    1.3828   1.6007
            2.6      0.8486   0.7194   -0.4108   -0.8351   -0.6114    0.1871    1.1726    1.3346   1.6007
            2.8      0.9026   0.7753   -0.4667   -0.9643   -0.7329   -0.0636    1.1475    1.3172   1.6007
            3.0      0.9585   0.8293   -0.5207   -1.0935   -0.8679   -0.2893    1.1089    1.3172   1.6007
            3.2      1.0125   0.8833   -0.5747   -1.2208   -0.9971   -0.5149    1.0376    1.2864   1.6007
            3.4      1.0665   0.9392   -0.6306   -1.3500   -1.1244   -0.7386    0.8042    1.2536   1.6007
            3.6      1.1224   0.9932   -0.6846   -1.4792   -1.2536   -0.9643    0.5651    1.2208   1.6007
            3.8      1.1764   1.0472   -0.7386   -1.6007   -1.3828   -1.1899    0.3144    1.1822   1.6007
            4.0      1.2304   1.1032   -0.7946   -1.6007   -1.6007   -1.4137    0.0636    1.0935   1.6007
            6.0      1.6007   1.6007   -1.6007   -1.6007   -1.6007   -1.6007   -1.6007   -0.9643   1.6007
        </tableData>
    </table>

    <!-- thrust effects of helical tip Mach -->
    <table name="CT_MACH" type="internal">
        <tableData>
            0.85   1.0
            1.05   0.8
        </tableData>
    </table>

    <!-- power-required effects of helical tip Mach -->
    <table name="CP_MACH" type="internal">
        <tableData>
            0.85   1.0
            1.05   1.8
            2.00   1.4
        </tableData>
    </table>

</propeller>
